# OpenSim document version 40000
Model OneDof_KneeFl:
  gravity: 0 -9.80665 0
  length_units: meters
  force_units: N
  credits:
    Arnold, E.M., Hamner, S.R., Ward, S.R., Lieber, R. L., and Delp, S.L.
  Ground
  BodySet:
    Body pelvis: mass=17.29544 [kg] mass_center=(-0.0879955 0 0) inertia=(0.160304 0.160304 0.081507 0 0 0)
        meshes=(r_pelvis.vtp l_pelvis.vtp sacrum.vtp)
      WrapCylinder Gmax1_at_pelvis_r: xyz_body_rotation=(-0.6 0.45 0) translation=(-0.0958367 -0.0991651 0.0730389)
          quadrant=-x radius=0.04586477 length=0.1739138
      WrapCylinder Gmax2_at_pelvis_r: xyz_body_rotation=(-0.75 0.39 0) translation=(-0.0995706 -0.0831384 0.0814204)
          quadrant=all radius=0.04646248 length=0.1131066
      WrapCylinder Gmax3_at_pelvis_r: xyz_body_rotation=(-0.1 0 0) translation=(-0.103304 -0.0881467 0.0814204)
          quadrant=all radius=0.04496876 length=0.1195566
      WrapCylinder Gmax1_at_pelvis_l: xyz_body_rotation=(0.6 -0.45 0) translation=(-0.0958367 -0.0991651 -0.0730389)
          quadrant=-x radius=0.04586477 length=0.1739138
      WrapCylinder Gmax2_at_pelvis_l: xyz_body_rotation=(0.75 -0.39 0) translation=(-0.0995706 -0.0831384 -0.0814204)
          quadrant=all radius=0.04646248 length=0.1131066
      WrapCylinder Gmax3_at_pelvis_l: xyz_body_rotation=(0.1 0 0) translation=(-0.103304 -0.0881467 -0.0814204)
          quadrant=all radius=0.04496876 length=0.1195566
      WrapCylinder PS_at_brim_r: xyz_body_rotation=(-0.25 -0.27 0.1) translation=(-0.0921028 -0.0601 0.0785467)
          quadrant=-y radius=0.05640571 length=0.1190552
      WrapCylinder PS_at_brim_l: xyz_body_rotation=(0.25 0.27 0.1) translation=(-0.0921028 -0.0601 -0.0785467)
          quadrant=-y radius=0.05640571 length=0.1190552
      WrapCylinder IL_at_brim_r: xyz_body_rotation=(-0.32 -0.24 0.9) translation=(-0.0883689 -0.0651084 0.0905203)
          quadrant=-y radius=0.0623936 length=0.1183222
      WrapCylinder IL_at_brim_l: xyz_body_rotation=(0.32 0.24 0.9) translation=(-0.0883689 -0.0651084 -0.0905203)
          quadrant=-y radius=0.0623936 length=0.1183222
    Body femur_r: mass=10.50065 mass_center=(0 -0.16286 0) inertia=(0.13876 0.0363739 0.146325 0 0 0)
        meshes=r_femur.vtp
      WrapCylinder Gastroc_at_condyles_r: translation=(0.00479 -0.39278 0) quadrant=all radius=0.02395 length=0.0958
      WrapCylinder KnExt_at_fem_r: xyz_body_rotation=(-0.0623366 0.0507601 0)
          translation=(0.00343757 -0.385817 0.00200328) quadrant=all radius=0.02395 length=0.0958
      WrapCylinder AB_at_femshaft_r: xyz_body_rotation=(1.66157 0.186644 0) translation=(0.0140284 -0.107866 0.0223837)
          quadrant=all radius=0.015807 length=0.06706
      WrapCylinder AL_at_femshaft_r: xyz_body_rotation=(1.77711 0.136489 0) translation=(0.0294419 -0.222169 0.0144789)
          quadrant=all radius=0.0192558 length=0.0958
      WrapCylinder AMprox_at_femshaft_r: xyz_body_rotation=(1.61126 0.18656 0)
          translation=(0.0049653 -0.0698332 0.0243361) quadrant=all radius=0.0202138 length=0.06706
      WrapCylinder AMmid_at_femshaft_r: xyz_body_rotation=(1.61139 0.13656 0)
          translation=(0.022046 -0.153961 0.0197197) quadrant=all radius=0.0205012 length=0.11496
      WrapCylinder AMdist_at_femshaft_r: xyz_body_rotation=(1.71188 0.186636 0)
          translation=(0.030279 -0.249785 0.00897129) quadrant=all radius=0.0208844 length=0.1916
      WrapCylinder AMisch_at_condyles_r: xyz_body_rotation=(1.71115 -0.463363 0)
          translation=(-0.0216998 -0.361004 -0.00302189) quadrant=all radius=0.03832 length=0.22992
      WrapCylinder PECT_at_femshaft_r: xyz_body_rotation=(1.81295 0.276344 0)
          translation=(0.00583013 -0.0809538 0.029162) quadrant=all radius=0.01437 length=0.0479
    Body tibia_r: mass=4.185518 mass_center=(0 -0.214518 0) inertia=(0.0751316 0.0076026 0.076175 0 0 0)
        meshes=(r_tibia.vtp r_fibula.vtp)
      WrapCylinder GasLat_at_shank_r: xyz_body_rotation=(2.96723 -0.279725 -1.47812)
          translation=(-0.0085026 -0.085026 -0.0037917) quadrant=-y radius=0.063195 length=0.1149
      WrapCylinder GasMed_at_shank_r: xyz_body_rotation=(2.96723 0.0279725 -1.47812)
          translation=(-0.0085026 -0.085026 -0.0037917) quadrant=-y radius=0.063195 length=0.1149
      WrapCylinder GR_at_condyles_r: xyz_body_rotation=(0 -0.4 0) translation=(-0.003447 -0.02298 0) quadrant=all
          radius=0.041364 length=0.1149
      WrapCylinder SM_at_condyles_r: xyz_body_rotation=(0 -0.1 0) translation=(-0.001149 -0.02298 0) quadrant=all
          radius=0.0404448 length=0.1149
      WrapCylinder ST_at_condyles_r: xyz_body_rotation=(0 -0.2 0) translation=(-0.002298 -0.0235545 0) quadrant=all
          radius=0.0488325 length=0.1149
      WrapCylinder BF_at_gastroc_r: translation=(-0.066642 -0.06894 0) quadrant=y radius=0.03447 length=0.17235
    Body patella_r: mass=0.09731399 mass_center=(0.0017244 0.0252912 0)
        inertia=(2.97416e-6 1.35858e-5 1.35858e-5 0 0 0) meshes=r_patella.vtp
    Body talus_r: mass=0.1128933 mass_center=(0 0 0) inertia=(0.00280824 0.00214191 0.00214191 0 0 0)
        meshes=r_talus.vtp
    Body calcn_r: mass=1.411166 mass_center=(0.114316 0.0498228 0) inertia=(0.00393153 0.00668762 0.00668762 0 0 0)
        meshes=r_foot.vtp
    Body toes_r: mass=0.2445268 mass_center=(0.0395532 0.00996457 -0.0262067)
        inertia=(0.000280824 0.000361749 0.000361749 0 0 0) meshes=r_bofoot.vtp
  JointSet:
    WeldJoint ground_pelvis: socket_parent_frame=ground_offset socket_child_frame=pelvis_offset
      PhysicalOffsetFrame ground_offset: socket_parent=/ground translation=(0 0.9 0) [meters]
      PhysicalOffsetFrame pelvis_offset: socket_parent=/bodyset/pelvis translation=(0 0 0)
    CustomJoint hip_r: socket_parent_frame=pelvis_offset socket_child_frame=femur_r_offset
      Coordinate hip_flexion_r: default_value=1.570796 range=(-0.5235988 2.094395) clamped=true locked=true
      PhysicalOffsetFrame pelvis_offset: socket_parent=/bodyset/pelvis translation=(-0.0700429 -0.0786209 0.0925079)
      PhysicalOffsetFrame femur_r_offset: socket_parent=/bodyset/femur_r translation=(0 0 0)
      SpatialTransform: axes_held_at_zero=(rotation2 rotation3 translation1 translation2 translation3)
        TransformAxis rotation1: coordinates=hip_flexion_r axis=(0 0 1) LinearFunction(coefficients=1 0)
    CustomJoint walker_knee_r: socket_parent_frame=femur_r_offset socket_child_frame=tibia_r_offset
      Coordinate knee_angle_r: default_value=0 range=(0 2.0944) clamped=true
      PhysicalOffsetFrame femur_r_offset: socket_parent=/bodyset/femur_r translation=(-0.00775022 -0.390826 -0.0026345)
          orientation=(-1.64157 1.44618 1.5708) [radians]
      PhysicalOffsetFrame tibia_r_offset: socket_parent=/bodyset/tibia_r
          translation=(-0.00929488 -0.00406149 -0.00170597) orientation=(-1.64157 1.44618 1.5708)
      SpatialTransform: axes_held_at_zero=translation3
        TransformAxis rotation1: coordinates=knee_angle_r axis=(1 0 0) LinearFunction(coefficients=1 0)
        TransformAxis rotation2: coordinates=knee_angle_r axis=(0 0 1)
          SimmSpline: x=(0 0.174533 0.349066 0.523599 0.698132 0.872665 1.0472 1.22173 1.39626 1.5708 1.74533 1.91986 2.0944)
              y=(0 0.0126809 0.0226969 0.0296054 0.0332049 0.0335354 0.0308779 0.0257548 0.0189295 0.011407 0.00443314 -0.00050475 -0.0016782)
        TransformAxis rotation3: coordinates=knee_angle_r axis=(0 1 0)
          SimmSpline: x=(0 0.174533 0.349066 0.523599 0.698132 0.872665 1.0472 1.22173 1.39626 1.5708 1.74533 1.91986 2.0944)
              y=(0 0.059461 0.109399 0.150618 0.18392 0.210107 0.229983 0.24435 0.254012 0.25977 0.262428 0.262788 0.261654)
        TransformAxis translation1: coordinates=knee_angle_r axis=(0 1 0)
          MultiplierFunction: scale=0.958
            SimmSpline: x=(0 0.174533 0.349066 0.523599 0.698132 0.872665 1.0472 1.22173 1.39626 1.5708 1.74533 1.91986 2.0944)
                y=(0 0.000479 0.000835 0.001086 0.001251 0.001346 0.001391 0.001403 0.0014 0.0014 0.001421 0.001481 0.001599)
        TransformAxis translation2: coordinates=knee_angle_r axis=(0 0 1)
          MultiplierFunction: scale=0.958
            SimmSpline: x=(0 0.174533 0.349066 0.523599 0.698132 0.872665 1.0472 1.22173 1.39626 1.5708 1.74533 1.91986 2.0944)
                y=(0 0.000988 0.001899 0.002734 0.003492 0.004173 0.004777 0.005305 0.005756 0.00613 0.006427 0.006648 0.006792)
    CustomJoint patellofemoral_r: socket_parent_frame=femur_r_offset socket_child_frame=patella_r_offset
      Coordinate knee_angle_r_beta: default_value=0 range=(-99999.9 99999.9) clamped=false
      PhysicalOffsetFrame femur_r_offset: socket_parent=/bodyset/femur_r translation=(-0.00775022 -0.390826 -0.0026345)
      PhysicalOffsetFrame patella_r_offset: socket_parent=/bodyset/patella_r translation=(0 0 0)
      SpatialTransform: axes_held_at_zero=(rotation2 rotation3)
        TransformAxis rotation1: coordinates=knee_angle_r_beta axis=(0 0 1)
          SimmSpline: x=(0 0.174533 0.349066 0.523599 0.698132 0.872665 1.0472 1.22173 1.39626 1.5708 1.74533 1.91986 2.0944)
              y=(0.00113686 -0.00629212 -0.105582 -0.253683 -0.414245 -0.579047 -0.747244 -0.91799 -1.09044 -1.26379 -1.43763 -1.61186 -1.78634)
        TransformAxis translation1: coordinates=knee_angle_r_beta axis=(1 0 0)
          MultiplierFunction: scale=0.958
            SimmSpline f9: x=(0 0.174533 0.349066 0.523599 0.698132 0.872665 1.0472 1.22173 1.39626 1.5708 1.74533 1.91986 2.0944)
                y=(0.0524 0.0488 0.0437 0.0371 0.0296 0.0216 0.0136 0.0057 -0.0019 -0.0088 -0.0148 -0.0196 -0.0227)
        TransformAxis translation2: coordinates=knee_angle_r_beta axis=(0 1 0)
          MultiplierFunction: scale=0.958
            SimmSpline f10: x=(0 0.174533 0.349066 0.523599 0.698132 0.872665 1.0472 1.22173 1.39626 1.5708 1.74533 1.91986 2.0944)
                y=(-0.0108 -0.019 -0.0263 -0.0322 -0.0367 -0.0395 -0.0408 -0.0404 -0.0384 -0.0349 -0.0301 -0.0245 -0.0187)
        TransformAxis translation3: axis=(0 0 1) MultiplierFunction(scale=0.958, Constant(value=0.00275))
    PinJoint ankle_r: socket_parent_frame=tibia_r_offset socket_child_frame=talus_r_offset
      Coordinate ankle_angle_r: default_value=0 range=(-0.4 0.4) clamped=true locked=true
      PhysicalOffsetFrame tibia_r_offset: socket_parent=/bodyset/tibia_r translation=(-0.01149 -0.4596 0)
          orientation=(0.175895 -0.105208 0.0186622)
      PhysicalOffsetFrame talus_r_offset: socket_parent=/bodyset/talus_r translation=(0 0 0)
          orientation=(0.175895 -0.105208 0.0186622)
    WeldJoint mtp_r: socket_parent_frame=calcn_r_offset socket_child_frame=toes_r_offset
      PhysicalOffsetFrame calcn_r_offset: socket_parent=/bodyset/calcn_r translation=(0.204396 -0.00332152 0.00161733)
          orientation=(-3.14159 0.619901 0)
      PhysicalOffsetFrame toes_r_offset: socket_parent=/bodyset/toes_r translation=(0 0 0)
          orientation=(-3.14159 0.619901 0)
    WeldJoint subtalar_r: socket_parent_frame=talus_r_offset socket_child_frame=calcn_r_offset
      PhysicalOffsetFrame talus_r_offset: socket_parent=/bodyset/talus_r translation=(-0.0557517 -0.0696689 0.0118604)
          orientation=(-1.76819 0.906223 1.8196)
      PhysicalOffsetFrame calcn_r_offset: socket_parent=/bodyset/calcn_r translation=(0 0 0)
          orientation=(-1.76819 0.906223 1.8196)
  ConstraintSet:
    CoordinateCouplerConstraint patellofemoral_knee_angle_r_con: independent_coordinate_names=knee_angle_r
        dependent_coordinate_name=knee_angle_r_beta scale_factor=1
        coupled_coordinates_function=LinearFunction(coefficients=1 0)
  ForceSet:
    CoordinateActuator knee_act: min_control=-1 max_control=1 coordinate=knee_angle_r optimal_force=3000
    DeGrooteFregly2016Muscle [values shared by the 11 below unless stated]: min_control=0 max_control=0
        max_contraction_velocity=15 ignore_activation_dynamics=true activation_time_constant=0.01
        deactivation_time_constant=0.04 default_activation=0.01 active_force_width_scale=1 fiber_damping=0.01
        passive_fiber_strain_at_one_norm_force=0.7 tendon_strain_at_one_norm_force=0.049
        tendon_compliance_dynamics_mode=implicit
    DeGrooteFregly2016Muscle bflh_r: max_isometric_force=1397.601 optimal_fiber_length=0.09542323
        tendon_slack_length=0.3179731 pennation_angle_at_optimal=0.1759182 [radians]
      PathPoint P1: pelvis (-0.129442 -0.119299 0.0701652)
      PathPoint P2: tibia_r (-0.0387213 -0.040215 0.0290697)
      PathPoint P3: tibia_r (-0.0329763 -0.0522795 0.0348147)
    DeGrooteFregly2016Muscle bfsh_r: max_isometric_force=592.9284 optimal_fiber_length=0.1094475
        tendon_slack_length=0.1049994 pennation_angle_at_optimal=0.2642232 ignore_tendon_compliance=true
      PathPoint P1: femur_r (0.00479 -0.202234 0.0224172)
      PathPoint P2: tibia_r (-0.0345849 -0.0481431 0.0365382)
      PathWrap: wrap_object=BF_at_gastroc_r method=hybrid
    DeGrooteFregly2016Muscle gaslat_r: max_isometric_force=1676.31 optimal_fiber_length=0.06769082
        tendon_slack_length=0.4329336 pennation_angle_at_optimal=0.2102268
      PathPoint P1: femur_r (-0.002874 -0.365381 0.0265366)
      PathPoint P2: calcn_r (0.00502988 0.0514836 -0.0079369)
      PathWrap shank: wrap_object=GasLat_at_shank_r method=hybrid
      PathWrap condyles: wrap_object=Gastroc_at_condyles_r method=hybrid
    DeGrooteFregly2016Muscle gasmed_r: max_isometric_force=3315.793 optimal_fiber_length=0.05848648
        tendon_slack_length=0.4572454 pennation_angle_at_optimal=0.1656816
      PathPoint P1: femur_r (0.007664 -0.36289 -0.0199264)
      PathPoint P2: calcn_r (0.00502988 0.0514836 -0.0079369)
      PathWrap shank: wrap_object=GasMed_at_shank_r method=hybrid
      PathWrap condyles: wrap_object=Gastroc_at_condyles_r method=hybrid
    DeGrooteFregly2016Muscle recfem_r: max_isometric_force=2332.635 optimal_fiber_length=0.07432678
        tendon_slack_length=0.4006043 pennation_angle_at_optimal=0.2170149
      PathPoint P1: pelvis (-0.0298712 -0.0388647 0.111714)
      PathPoint P2: patella_r (0.00958 0.046942 0.0006706)
      PathPoint P3: patella_r (0.0115918 0.0418646 -0.000958)
      PathPoint P4: patella_r (0.00479 0.00236626 2.874e-5)
      PathPoint P5: tibia_r (0.0374574 -0.0725249 -0.00054003)
      PathWrap: wrap_object=KnExt_at_fem_r method=hybrid
    DeGrooteFregly2016Muscle semimem_r: max_isometric_force=2342.476 optimal_fiber_length=0.06712464
        tendon_slack_length=0.3381389 pennation_angle_at_optimal=0.2545615
      PathPoint P1: pelvis (-0.122845 -0.11419 0.0735178)
      PathPoint P2: tibia_r (-0.033321 -0.0479133 -0.0225204)
      PathWrap: wrap_object=SM_at_condyles_r method=hybrid
    DeGrooteFregly2016Muscle semiten_r: max_isometric_force=629.306 optimal_fiber_length=0.1916541
        tendon_slack_length=0.2454751 pennation_angle_at_optimal=0.241295
      PathPoint P1: pelvis (-0.129193 -0.125509 0.0616639)
      PathPoint P2: tibia_r (-0.0358488 -0.0583692 -0.0263121)
      PathPoint P3: tibia_r (0.0021831 -0.0888177 -0.0134433)
      PathWrap: wrap_object=ST_at_condyles_r method=hybrid
    DeGrooteFregly2016Muscle tfl_r: max_isometric_force=437.6406 optimal_fiber_length=0.09307454
        tendon_slack_length=0.25 pennation_angle_at_optimal=0.05235988
      PathPoint P1: pelvis (-0.0387081 0.0214357 0.148592)
      PathPoint P2: femur_r (0.0281652 -0.095321 0.0571926)
      PathPoint P3: femur_r (0.0102506 -0.38799 0.0310392)
      PathPoint P4: tibia_r (0.0124092 -0.047109 0.0397554)
    DeGrooteFregly2016Muscle vasint_r: max_isometric_force=1806.474 optimal_fiber_length=0.09844094
        tendon_slack_length=0.2004613 pennation_angle_at_optimal=0.06309973
      PathPoint P1: femur_r (0.027782 -0.184319 0.029698)
      PathPoint P2: femur_r (0.032093 -0.199647 0.027303)
      PathPoint P3: patella_r (0.0055564 0.045984 -0.0005748)
      PathPoint P4: patella_r (0.00479 0.00236626 -0.00037362)
      PathPoint P5: tibia_r (0.0374229 -0.0726168 0.00049407)
      PathWrap: wrap_object=KnExt_at_fem_r method=hybrid
    DeGrooteFregly2016Muscle vaslat_r: max_isometric_force=5479.752 optimal_fiber_length=0.09837626
        tendon_slack_length=0.2183293 pennation_angle_at_optimal=0.2528673
      PathPoint P1: femur_r (0.0045984 -0.177613 0.0334342)
      PathPoint P2: femur_r (0.0257702 -0.248218 0.0391822)
      PathPoint P3: patella_r (0.0098674 0.0405234 0.0135078)
      PathPoint P4: patella_r (0.00479 0.00236626 0.00702214)
      PathPoint P5: tibia_r (0.0373885 -0.0728236 0.00587139)
      PathWrap: wrap_object=KnExt_at_fem_r method=hybrid
    DeGrooteFregly2016Muscle vasmed_r: max_isometric_force=2924.465 optimal_fiber_length=0.09610254
        tendon_slack_length=0.1984639 pennation_angle_at_optimal=0.4222225
      PathPoint P1: femur_r (0.013412 -0.201084 0.0180104)
      PathPoint P2: femur_r (0.0341048 -0.26527 0.0008622)
      PathPoint P3: patella_r (0.0060354 0.042631 -0.016286)
      PathPoint P4: patella_r (0.00479 0.00236626 -0.008143)
      PathPoint P5: tibia_r (0.0366531 -0.0730419 -0.00779022)
      PathWrap: wrap_object=KnExt_at_fem_r method=hybrid
