# OpenSim document version 40000
AnalyzeTool IK:
  model_file: C:\MyCloud\GitHub\Muscle_Tendon_Passive_Parameter_Estimation\MutilPhase\gait2392_simbody_scaled.osim
  replace_force_set: false
  results_directory: C:\MyCloud\GitHub\Muscle_Tendon_Passive_Parameter_Estimation\MutilPhase\MuscleAnalysis\Trial2
  output_precision: 8
  initial_time: 0.517
  final_time: 1.95
  solve_for_equilibrium_for_auxiliary_states: false
  maximum_number_of_integrator_steps: 20000
  maximum_integrator_step_size: 1
  minimum_integrator_step_size: 1e-8
  integrator_error_tolerance: 1e-5
  coordinates_file: IK.mot
  lowpass_cutoff_frequency_for_coordinates: -1
  AnalysisSet Analyses:
    MuscleAnalysis: start_time=0.517 end_time=1.95 step_interval=1 in_degrees=true muscle_list=all
        moment_arm_coordinate_list=(ankle_angle_r knee_angle_r hip_flexion_r hip_adduction_r hip_rotation_r ankle_angle_l knee_angle_l hip_flexion_l hip_adduction_l hip_rotation_l)
        compute_moments=true
