# OpenSim document version 40000
AnalyzeTool OneDof_KneeFl:
  model_file: ../ModelGenerator/OneDOF_Knee_DeGroote.osim
  replace_force_set: false
  results_directory: ../../../../Users/se108102/Desktop/New folder (4)
  output_precision: 8
  initial_time: 0
  final_time: 20
  solve_for_equilibrium_for_auxiliary_states: false
  maximum_number_of_integrator_steps: 20000
  maximum_integrator_step_size: 1
  minimum_integrator_step_size: 1e-8
  integrator_error_tolerance: 1e-5
  states_file: ../TorqueSimulation/referenceCoordinates.sto
  lowpass_cutoff_frequency_for_coordinates: -1
  AnalysisSet Analyses:
    MuscleAnalysis: start_time=0 end_time=20 step_interval=1 in_degrees=true muscle_list=all
        moment_arm_coordinate_list=all compute_moments=false
